New TSData.1/0_D1_AA_D2__D1_TS NormAmps=165 Rac=0.18371001 Runits=kft GMRac=0.0111 GMRUnits=ft Radius=0.184 Radunits=in DiaCable=0.88 DiaIns=0.87 InsLayer=0.25099999 EpsR=2.3 DiaShield=0.88 TapeLayer=0.0049999952 TapeLap=0
